# Energy and Force Calculations of the Shock Force Dispersion
# Constants
m_R := 35 kg = 77.1618 lbm
g := 9.81 m/s^2
W_R := m_R*g = 343.35 N
L := 12.5 m = 41.0105 ft
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t_0 := 0 s
t_2 := 4 s
v_0 := 0 m/s
v_3 := 30 m/s = 98.4252 ft/s
t_1 := 1 s
t_3 := 4.5 s
# *time is taken wrt t0*
# Velocities
v_1 := v_0 + g*t_1 = 9.81 m/s
v_2 := v_0 + g*t_2 = 39.24 m/s
# Momentum of the system when the parachute is fully inflated
E_Rs := 1/2*m_R*v_2^2 = 26946.1 J
# Energy that must be absorbed
E_gain := 1/2*m_R*(v_3 - v_2)^2 = 1494.11 J
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# i.e. the system will lose the equivalent amount of potential
P_lose := E_gain
# Therefore the rocket has fallen
h := P_lose/(m_R*g) = 4.35156 m
# Thus, the force that must be absorbed
F_abs := E_gain/h = 343.35 N
# From the graph
# Using the weight of the rocket to find the expected strain,
ε := 1%
# Using the 1" Tubular Webbing data and assuming the trendline of the data points to be linear, the spring coefficient is then implied to be constant calculated as
k := W_R/(ε*L) = 2746.8 kg/s^2
